import Sofa
import sys
import math
import os
import csv
import yaml

__file = __file__.replace('\\', '/') # windows


def createScene(rootNode):
    rootNode.addObject('RequiredPlugin', name='Engine', pluginName='SofaEngine')
    rootNode.addObject('RequiredPlugin', name='ImplicitOdeSolver', pluginName='SofaImplicitOdeSolver')
    rootNode.addObject('RequiredPlugin', name='SparseSolver', pluginName='SofaSparseSolver')
    rootNode.addObject('RequiredPlugin', name='Loader', pluginName='SofaLoader')
    rootNode.addObject('RequiredPlugin', name='MiscForceField', pluginName='SofaMiscForceField')
    rootNode.addObject('RequiredPlugin', name='SimpleFem', pluginName='SofaSimpleFem')
    rootNode.addObject('RequiredPlugin', name='Deformable', pluginName='SofaDeformable')
    # rootNode.addObject('RequiredPlugin', name='Python3', pluginName='SofaPython3')
    rootNode.addObject('RequiredPlugin', name='Optimus', pluginName='Optimus')

    try:
        sys.argv[0]
    except:
        commandLineArguments = []
    else:
        commandLineArguments = sys.argv

    # if len(commandLineArguments) > 1:
    #     configFileName = commandLineArguments[1]
    configFileName = "liver_nonlinear_BC_point_cloud_scene_config_bench.yml"
    # else:
    #     print('ERROR: Must supply a yaml config file as an argument!')
    #     return
    print("Command line arguments for python : " + str(commandLineArguments))

    with open(configFileName, 'r') as stream:
        try:
            options = yaml.safe_load(stream)

        except yaml.YAMLError as exc:
            print(exc)
            return

    if options['general_parameters']['linear_solver_kind'] == 'Pardiso':
        rootNode.addObject('RequiredPlugin', name='Pardiso', pluginName='SofaPardisoSolver')

    rootNode.addObject(LiverControlPointGenObs_Controller(name="LiverControlPoint_GenObs", node=rootNode, opt=options))
    return 0


class LiverControlPointGenObs_Controller(Sofa.Core.Controller):

    def __init__(self, *args, **kwargs):
        # These are needed (and the normal way to override from a python class)
        Sofa.Core.Controller.__init__(self, *args, **kwargs)

        self.rootNode = kwargs["node"]
        self.options = kwargs["opt"]
        if not os.path.isdir('obs_testing'):
            os.mkdir('obs_testing')
        self.scenario_type = 'Generate_data'
        if 'scenario_type' in self.options['general_parameters'].keys() and self.options['general_parameters']['scenario_type'] == 'Validate_estimations':
            self.scenario_type = 'Validate_estimations'

        self.rootNode.findData('gravity').value = self.options['general_parameters']['gravity']
        self.rootNode.findData('dt').value = self.options['general_parameters']['delta_time']
        self.createGraph(self.rootNode)

        return None


    def createGraph(self, rootNode):
        ### rootNode
        rootNode.addObject('VisualStyle', displayFlags='hideVisualModels showBehaviorModels hideCollisionModels hideMappings showForceFields showInteractionForceFields')
        rootNode.addObject('DefaultAnimationLoop')
        rootNode.addObject('DefaultVisualManagerLoop')

        ### fixed nodes
        fixNode = rootNode.addChild('fixNode')
        fixNode.addObject('MechanicalObject', template='Vec3d', name='fixElements', showObject='true', position=self.options['boundary_parameters']['external_points'])
        fixNode.addObject('ShowSpheres', position='@fixElements.position', color='1.0 0.0 1.0 1', radius="0.01", showIndicesScale='0.0')

        ### external impact node
        dotNode = rootNode.addChild('dotNode')
        self.impactPoint = dotNode.addObject('MechanicalObject', template='Vec3d', name='dot', showObject='true', position=self.options['impact_parameters']['init_position'])
        dotNode.addObject('ShowSpheres', position='@dot.position', color='1.0 0.0 1.0 1', radius="0.01", showIndicesScale='0.0')
        if self.options['obs_generating_parameters']['save_observations'] and self.scenario_type == 'Generate_data':
            dotNode.addObject('BoxROI', name='dotBounds', box='0.14 0.15 0.37 0.18 0.17 0.4', doUpdate='0')
            dotNode.addObject('OptimMonitor', name='toolMonitor', template='Vec3d', showPositions='1', indices='@dotBounds.indices', ExportPositions='1', fileName = self.options['impact_parameters']['observation_file_name'])
        self.index = 0

        ### general node
        simuNode = rootNode.addChild('simuNode')
        self.simuNode = simuNode

        ### solvers
        if self.options['general_parameters']['solver_kind'] == 'Euler':
            simuNode.addObject('EulerImplicitSolver', rayleighStiffness=self.options['general_parameters']['rayleigh_stiffness'], rayleighMass=self.options['general_parameters']['rayleigh_mass'])
        elif self.options['general_parameters']['solver_kind'] == 'Symplectic':
            simuNode.addObject('VariationalSymplecticSolver', rayleighStiffness=self.options['general_parameters']['rayleigh_stiffness'], rayleighMass=self.options['general_parameters']['rayleigh_mass'], newtonError='1e-12', steps='1', verbose='0')
        elif self.options['general_parameters']['solver_kind'] == 'Newton':
            simuNode.addObject('StaticSolver', name="NewtonStatic", printLog="0", absolute_correction_tolerance_threshold="1e-8", absolute_residual_tolerance_threshold="1e-8", should_diverge_when_residual_is_growing="1", newton_iterations="2")
        else:
            print('Unknown solver type!')

        if self.options['general_parameters']['linear_solver_kind'] == 'Pardiso':
            simuNode.addObject('SparsePARDISOSolver', name='LDLsolver', verbose='0', symmetric='1', exportDataToFolder='')
        elif self.options['general_parameters']['linear_solver_kind'] == 'LDL':
            simuNode.addObject('SparseLDLSolver', template='CompressedRowSparseMatrixMat3x3d', printLog="0")
        elif self.options['general_parameters']['linear_solver_kind'] == 'CG':
            simuNode.addObject('CGLinearSolver', iterations="20", tolerance="1e-12", threshold="1e-12")
        else:
            print('Unknown linear solver type!')

        ### object loader
        fileExtension = self.options['system_parameters']['volume_file_name']
        fileExtension = fileExtension[fileExtension.rfind('.') + 1:]
        if fileExtension == 'vtk' or fileExtension == 'vtu':
            simuNode.addObject('MeshVTKLoader', name='loader', filename=self.options['system_parameters']['volume_file_name'])
        elif fileExtension == 'msh':
            simuNode.addObject('MeshGmshLoader', name='loader', filename=self.options['system_parameters']['volume_file_name'])
        else:
            print('Unknown file type!')

        ### mechanical object
        simuNode.addObject('MechanicalObject', src='@loader', name='Volume')
        simuNode.addObject('TetrahedronSetTopologyContainer', name="Container", src="@loader", tags=" ")
        simuNode.addObject('TetrahedronSetTopologyModifier', name="Modifier")
        simuNode.addObject('TetrahedronSetGeometryAlgorithms', name="GeomAlgo")
        if 'total_mass' in self.options['general_parameters'].keys():
            simuNode.addObject('UniformMass', totalMass=self.options['general_parameters']['total_mass'])
        if 'density' in self.options['general_parameters'].keys():
            simuNode.addObject('MeshMatrixMass', printMass='0', lumping='1', massDensity=self.options['general_parameters']['density'], name='mass')

        ### material properties
        # nu=0.45
        # E=5000
        # lamb=(E*nu)/((1+nu)*(1-2*nu))
        # mu=E/(2+2*nu)
        # materialParams='{} {}'.format(mu,lamb)
        # simuNode.addObject('TetrahedralTotalLagrangianForceField', name='FEM', materialName='StVenantKirchhoff', ParameterSet=materialParams)
        simuNode.addObject('TetrahedronFEMForceField', updateStiffness='1', name='FEM', listening='true', drawHeterogeneousTetra='1', method='large', youngModulus=self.options['object_parameters']['young_modulus'], poissonRatio=self.options['object_parameters']['poisson_ratio'])

        ### boundary conditions
        if 'boundary_conditions_list' in self.options['boundary_parameters'].keys():
            for index in range(0, len(self.options['boundary_parameters']['boundary_conditions_list'])):
                bcElement = self.options['boundary_parameters']['boundary_conditions_list'][index]
                simuNode.addObject('BoxROI', box=bcElement['boxes_coordinates'], name='boundBoxes'+str(index), drawBoxes='0', doUpdate='0')
                if bcElement['condition_type'] == 'fixed':
                    simuNode.addObject('FixedConstraint', indices='@boundBoxes'+str(index)+'.indices')
                elif bcElement['condition_type'] == 'elastic':
                    if self.options['boundary_parameters']['spring_type'] == 'PolynomialRestshape':
                        simuNode.addObject('PolynomialRestShapeSpringsForceField', listening="1", printLog="0", points='@boundBoxes'+str(index)+'.indices', initialLength=self.options['boundary_parameters']['initial_length'], polynomialDegree=bcElement['polynomial_degrees'], polynomialStiffness=bcElement['polynomial_stiffness_values'], drawMode='1')
                    elif self.options['boundary_parameters']['spring_type'] == 'Polynomial':
                        simuNode.addObject('PolynomialSpringsForceField', listening="1", printLog="0", object1='@.', firstObjectPoints='@boundBoxes'+str(index)+'.indices', object2='@../fixNode/fixElements', secondObjectPoints=self.options['boundary_parameters']['external_indices'], polynomialDegree=bcElement['polynomial_degrees'], polynomialStiffness=bcElement['polynomial_stiffness_values'], drawMode='1')
                    else:
                        simuNode.addObject('RestShapeSpringForceField', stiffness=bcElement['spring_stiffness_values'], angularStiffness="1", points='@boundBoxes'+str(index)+'.indices')
                else:
                    print('Unknown type of boundary conditions')

        ### attachment to external object
        simuNode.addObject('BoxROI', name='impactBounds', box=self.options['object_parameters']['attachment_coordinates'], doUpdate='0')
        simuNode.addObject('RestShapeSpringsForceField', name='Springs', stiffness='10000', angularStiffness='1', external_rest_shape='@../dotNode/dot', points='@impactBounds.indices')

        ### saving generated observations
        if self.options['obs_generating_parameters']['save_observations'] and self.scenario_type == 'Generate_data':
            if 'use_point_cloud' in self.options['obs_generating_parameters']:
                pointCloudNode = simuNode.addChild('pointCloud')
                pointCloudNode.addObject('MeshObjLoader', name="pcloader", filename=self.options['point_cloud_parameters']['mesh_file'])
                pointCloudNode.addObject('MechanicalObject', src='@pcloader', name='PointCloud')
                pointCloudNode.addObject('BarycentricMapping', name='VisualMapping', input='@../Volume', output='@PointCloud')
                pointCloudNode.addObject('ShowSpheres', position='@PointCloud.position', color='0.0 0.5 0.0 1', radius="0.0014", showIndicesScale='0.0')
                pointCloudNode.addObject('BoxROI', name='observationBox', box='-1 -1 -1 1 1 1', doUpdate='0')
                pointCloudNode.addObject('OptimMonitor', name='ObservationMonitor', indices='@observationBox.indices', fileName = self.options['system_parameters']['observation_file_name'], ExportPositions='1', ExportVelocities='0', ExportForces='0')
            else:
                obsNode = simuNode.addChild('obsNode')
                obsNode.addObject('MeshVTKLoader', name='obsloader', filename=self.options['system_parameters']['observation_points_file_name'])
                obsNode.addObject('MechanicalObject', name='observations', position='@obsloader.position')
                obsNode.addObject('BarycentricMapping')
                obsNode.addObject('BoxROI', name='observationBox', box='-1 -1 -1 1 1 1', doUpdate='0')
                obsNode.addObject('OptimMonitor', name='ObservationMonitor', indices='@observationBox.indices', fileName = self.options['system_parameters']['observation_file_name'], ExportPositions='1', ExportVelocities='0', ExportForces='0', saveZeroStep='0')
                obsNode.addObject('ShowSpheres', name="obsVisu", radius="0.002", color="1 0 0 1", position='@observations.position')

        ### validation grid
        if self.scenario_type == 'Validate_estimations':
            if 'validation_grid_parameters' in self.options.keys():
                for index in range(0, len(self.options['validation_grid_parameters'])):
                    gridElement = self.options['validation_grid_parameters'][index]
                    obsGrid = simuNode.addChild('obsGrid'+str(index))
                    obsGrid.addObject('RegularGrid', name="grid" + str(index), min=gridElement['minimum_values'], max=gridElement['maximum_values'], n=gridElement['amount_of_layers'])
                    obsGrid.addObject('MechanicalObject', name='MO' + str(index), template='Vec3d', src='@grid'+str(index), showIndicesScale='0.00025', showIndices='1')
                    obsGrid.addObject('BarycentricMapping')
                    obsGrid.addObject('ShowSpheres', position='@MO'+str(index)+'.position', color='0.0 0.5 0.0 1', radius="0.0054", showIndicesScale='0.0')
                    if self.options['obs_generating_parameters']['save_observations']:
                        obsGrid.addObject('BoxROI', name='gridBox'+str(index), box='-1 -1 -1 1 1 1', doUpdate='0')
                        obsGrid.addObject('OptimMonitor', name='GridMonitor'+str(index), indices='@gridBox'+str(index)+'.indices', fileName = gridElement['grid_file_name'], ExportPositions='1', ExportVelocities='0', ExportForces='0')

        return 0


    def onAnimateEndEvent(self, deltaTime):
        ### modify external impact
        if self.index < 10000:
            with self.impactPoint.position.writeableArray() as pos:
                pos[0][1] = pos[0][1] - 0.00002
            self.index = self.index + 1

        return 0;

    def onMouseButtonLeft(self, mouseX, mouseY, isPressed):
        return 0;

    def onKeyReleased(self, c):
        return 0;

    def initGraph(self, node):
        return 0;

    def onKeyPressed(self, c):
        return 0;

    def onMouseWheel(self, mouseX, mouseY, wheelDelta):
        return 0;

    def storeResetState(self):
        return 0;

    def cleanup(self):
        return 0;

    def onGUIEvent(self, strControlID, valueName, strValue):
        return 0;

    def onLoaded(self, node):
        return 0;

    def reset(self):
        return 0;

    def onMouseButtonMiddle(self, mouseX, mouseY, isPressed):
        return 0;

    def bwdInitGraph(self, node):
        return 0;

    def onScriptEvent(self, senderNode, eventName, data):
        return 0;

    def onMouseButtonRight(self, mouseX, mouseY, isPressed):
        return 0;

    def onAnimateBeginEvent(self, deltaTime):
        return 0;
