import Sofa
import os

__file = __file__.replace('\\', '/') # windows


def createScene(rootNode):
    rootNode.createObject('RequiredPlugin', name='Deformable', pluginName='SofaDeformable')
    rootNode.createObject('RequiredPlugin', name='Engine', pluginName='SofaEngine')
    rootNode.createObject('RequiredPlugin', name='GeneralEngine', pluginName='SofaGeneralEngine')
    rootNode.createObject('RequiredPlugin', name='ImplicitOdeSolver', pluginName='SofaImplicitOdeSolver')
    rootNode.createObject('RequiredPlugin', name='Loader', pluginName='SofaLoader')
    rootNode.createObject('RequiredPlugin', name='MiscForceField', pluginName='SofaMiscForceField')
    rootNode.createObject('RequiredPlugin', name='Rigid', pluginName='SofaRigid')
    rootNode.createObject('RequiredPlugin', name='SimpleFem', pluginName='SofaSimpleFem')
    rootNode.createObject('RequiredPlugin', name='MiscFem', pluginName='SofaMiscFem')
    rootNode.createObject('RequiredPlugin', name='MeshCollision', pluginName='SofaMeshCollision')
    rootNode.createObject('RequiredPlugin', name='BoundaryCondition', pluginName='SofaBoundaryCondition')
    rootNode.createObject('RequiredPlugin', name='Visual', pluginName='SofaOpenglVisual')
    rootNode.createObject('RequiredPlugin', name='Exporter', pluginName='SofaExporter')
    rootNode.createObject('RequiredPlugin', name='Python', pluginName='SofaPython')
    rootNode.createObject('RequiredPlugin', name='Optimus', pluginName='Optimus')
    rootNode.createObject('PythonScriptController', name='GenerateObservations', filename=__file, classname='synth1_GenObs')


class synth1_GenObs(Sofa.PythonScriptController):

    def createGraph(self, rootNode):
        ### configuration
        volumeFileName='../../data/brickD/brickD_536.vtk'
        surfaceSTL='../../data/brickD/brickD_536.stl'
        outputDir='observations'
        saveObservations=1
        self.solver = 'Newton' # options are 'Newton' and 'Euler'
        self.linearSolver = 'CG' # options are 'Pardiso' and 'CG'

        if saveObservations:
            os.system('mv '+outputDir+ ' observations/arch')
            os.system('mkdir -p '+outputDir)

        if self.linearSolver == 'Pardiso':
            rootNode.createObject('RequiredPlugin', name='Pardiso', pluginName='SofaPardisoSolver')

        ### rootNode
        rootNode.createObject('VisualStyle', displayFlags='showVisual showBehavior showCollision hideMapping showWireframe hideNormals')

        rootNode.findData('gravity').value="0 0 0"
        rootNode.findData('dt').value="1"

        ### tool node
        tool = rootNode.createChild('tool')
        tool.createObject('StaticSolver', name="NewtonStatic", printLog="0", correction_tolerance_threshold="1e-8", residual_tolerance_threshold="1e-8", should_diverge_when_residual_is_growing="1", newton_iterations="3")
        tool.createObject('CGLinearSolver', iterations="100", tolerance="1e-20", threshold="1e-20")
        tool.createObject('PointSetTopologyContainer', name='pointTopo', position='0.045 0.1 0.0   0.05 0.1 0.0   0.055 0.1 0.0   0.045 0.1 -0.005   0.05 0.1 -0.005   0.055 0.1 -0.005    0.045 0.1 -0.01   0.05 0.1 -0.01   0.055 0.1 -0.01')
        tool.createObject('MechanicalObject', name='MO', position='@pointTopo.position')
        tool.createObject('SphereCollisionModel', color='0 0 1 1', radius='0.0014')
        tool.createObject('LinearMovementConstraint', indices='0 1 2 3 4 5 6 7 8', keyTimes='0 200', movements='0 0 0    0.0 0.04 0')

        ### save tool observations
        if saveObservations:
            tool.createObject('VTKExporter', position="@MO.position", edges="0", listening="0" , XMLformat='0', exportAtBegin='1', exportEveryNumberOfSteps="0", filename=outputDir+'/tool.vtk')
            tool.createObject('BoxROI', name='toolDOFs', box='-1 -1 -1 1 1 1')
            tool.createObject('OptimMonitor', name='toolMonitor', fileName=outputDir+'/tool', showPositions='1', indices="@toolDOFs.indices", ExportPositions="1", ExportVelocities="1", ExportForces="1")

        ### object node
        simuNode = rootNode.createChild('simu')
        simuNode.activated = 'true'

        ### solvers
        if self.solver == 'Euler':
            simuNode.createObject('EulerImplicitSolver', rayleighStiffness='0.1', rayleighMass='0.1')
        elif self.solver == 'Newton':
            simuNode.createObject('StaticSolver', name="NewtonStatic", newton_iterations='3', correction_tolerance_threshold="1e-8", residual_tolerance_threshold="1e-8", should_diverge_when_residual_is_growing="1", printLog='0')
        else:
            print 'Unknown solver type'

        if self.linearSolver == 'CG':
            simuNode.createObject('CGLinearSolver', iterations="100", tolerance="1e-20", threshold="1e-20")
            # simuNode.createObject('StepPCGLinearSolver', name="StepPCG", iterations="10000", tolerance="1e-12", preconditioners="precond", verbose="1", precondOnTimeStep="1")
        elif self.linearSolver == 'Pardiso':
            simuNode.createObject('SparsePARDISOSolver', symmetric='1', exportDataToFolder='', name='precond', iterativeSolverNumbering='1')
        else:
            print 'Unknown linear solver type'

        ### mechanical object
        simuNode.createObject('MeshVTKLoader', name='loader', filename=volumeFileName)
        simuNode.createObject('MechanicalObject', src='@loader', showIndicesScale='0.00025', name='MO', template='Vec3d', showIndices='0')
        simuNode.createObject('TetrahedronSetTopologyContainer', name='Container', src="@loader")
        simuNode.createObject('TetrahedronSetTopologyModifier', name='Modifier')
        simuNode.createObject('TetrahedronSetGeometryAlgorithms', name='GeomAlgs')
        simuNode.createObject('UniformMass', totalMass='0.01')

        ### material and elasticiy properties
        nu=0.45
        E=5000
        lamb=(E*nu)/((1+nu)*(1-2*nu))
        mu=E/(2+2*nu)
        materialParams='{} {}'.format(mu,lamb)
        simuNode.createObject('TetrahedronHyperelasticityFEMForceField', name='FEM', materialName='StVenantKirchhoff', ParameterSet=materialParams)
        # simuNode.createObject('TetrahedronFEMForceField', name='FEM', youngModulus=E, poissonRatio=nu, computeVonMisesStress='0', method='large')
        # simuNode.createObject('FastTetrahedralCorotationalForceField', name='FEM', youngModulus=E, poissonRatio=nu)

        simuNode.createObject('BoxROI', box='-0.001 -0.001 -0.011 0.025 0.001 0.001', drawBoxes='0', name='FROI1')
        simuNode.createObject('RestShapeSpringsForceField', stiffness='1e5', name='fixingSpring', points='@FROI1.indices', springColor='0 1 0 1')
        if self.linearSolver == 'Pardiso':
            simuNode.createObject('Mapped3DoFForceField', mappedFEM='mappedTool/toolSpring', mappedMechObject='mappedTool/MO', printLog='0', mapping='mappedTool/baryMapping')
        simuNode.createObject('PointsFromIndices', template='Vec3d', name='FixedPoints', indices='@FROI1.indices')

        if saveObservations:
            simuNode.createObject('VTKExporter', position="@MO.position", listening="1" , XMLformat='0', exportAtBegin="1", exportAtEnd='0', exportEveryNumberOfSteps="0", filename=outputDir+'/object.vtk', tetras='1', edges='0')

        ### mapped tool node
        mappedTool = simuNode.createChild('mappedTool')
        mappedTool.createObject('MechanicalObject', position='0.045 0.1 0.0   0.05 0.1 0.0   0.055 0.1 0.0   0.045 0.1 -0.005   0.05 0.1 -0.005   0.055 0.1 -0.005    0.045 0.1 -0.01   0.05 0.1 -0.01   0.055 0.1 -0.01', name='MO')
        self.toolSprings=mappedTool.createObject('RestShapeSpringsForceField', stiffness='1e5', name='toolSpring', springColor='0 1 0 1', drawSpring='1', printLog='0', listening='1', external_rest_shape='@/tool/MO')
        mappedTool.createObject('SphereCollisionModel', color='0 0 1 1', radius='0.001')
        mappedTool.createObject('BarycentricMapping', name='baryMapping')

        ### observation nodes
        obsGrid = simuNode.createChild('obsGrid')
        monitorFile=outputDir+'/observations'
        obsGrid.createObject('RegularGridTopology', name="grid", min='0.0 0.08 0.0', max='0.1 0.1 -0.0', n='10 3 1')  # obs. grid
        obsGrid.createObject('MechanicalObject', src='@grid', showIndicesScale='0.00025', name='MO', template='Vec3d', showIndices='1')
        obsGrid.createObject('BarycentricMapping')
        obsGrid.createObject('SphereCollisionModel', color='0.0 0.5 0.0 1', radius="0.0014", template='Vec3d')

        if saveObservations:
            obsGrid.createObject('VTKExporter', filename=monitorFile+'.vtk', position="@MO.position", listening="0" , XMLformat='0', exportAtBegin='1', exportEveryNumberOfSteps="0")
            obsGrid.createObject('BoxROI', name='gridDOFs', box='-1 -1 -1 1 1 1')
            obsGrid.createObject('OptimMonitor', name='observationMonitor', fileName=monitorFile, indices="@gridDOFs.indices", ExportPositions="1", ExportVelocities="0", ExportForces="0")

        ### object visualization
        visNode = simuNode.createChild('ObjectVisualization1')
        visNode.createObject('MeshSTLLoader', name='objectSLoader', filename=surfaceSTL)
        visNode.createObject('MechanicalObject', src="@objectSLoader", name="Surface")
        visNode.createObject('TriangleSetTopologyContainer', name="Container", src="@objectSLoader", tags=" ")
        visNode.createObject('LineCollisionModel', color="0 0 0 1")
        visNode.createObject('TriangleCollisionModel', color="1 0 0 1")
        visNode.createObject('BarycentricMapping')

        visNode2 = simuNode.createChild('ObjectVisualization2')
        visNode2.createObject('VisualStyle', displayFlags='showVisual showBehavior showCollision hideMapping hideWireframe hideNormals')
        visNode2.createObject('MeshSTLLoader', name='objectSLoader', filename=surfaceSTL)
        visNode2.createObject('MechanicalObject',src="@objectSLoader",name="Surface")
        visNode2.createObject('TriangleSetTopologyContainer', name="Container", src="@objectSLoader", tags=" ")
        visNode2.createObject('TriangleCollisionModel', color="1 0 0 0.2")
        visNode2.createObject('BarycentricMapping')

        ### verification node
        asNode = simuNode.createChild('assessNode')
        asNode.createObject('RegularGridTopology', name="grid", min='0.01 0.005 -0.005', max='0.09 0.07 -0.005', n='8 5 1')  # obs. grid
        self.asMO=asNode.createObject('MechanicalObject', src='@grid', showIndicesScale='0.00025', name='MO', template='Vec3d', showIndices='1')
        asNode.createObject('SphereCollisionModel', color='1 0 1 1', radius="0.001", template='Vec3d')
        asNode.createObject('BarycentricMapping')

        return 0;


    def onEndAnimationStep(self, deltaTime):
        return 0;

    def onKeyPressed(self, c):
        return 0;

    def onKeyReleased(self, c):
        return 0;

    def onLoaded(self, node):
        return 0;

    def onMouseButtonLeft(self, mouseX, mouseY, isPressed):
        return 0;

    def onMouseButtonRight(self, mouseX, mouseY, isPressed):
        return 0;

    def onMouseButtonMiddle(self, mouseX, mouseY, isPressed):
        return 0;

    def onMouseWheel(self, mouseX, mouseY, wheelDelta):
        return 0;

    def onGUIEvent(self, strControlID, valueName, strValue):
        return 0;

    def onBeginAnimationStep(self, deltaTime):
        return 0;

    def onScriptEvent(self, senderNode, eventName, data):
        return 0;

    def initGraph(self, node):
        return 0;

    def bwdInitGraph(self, node):
        return 0;

    def storeResetState(self):
        return 0;

    def reset(self):
        return 0;

    def cleanup(self):
        return 0;
