<?xml version="1.0" ?>
<Node name="root" dt="0.01" showBoundingTree="0" gravity="0 0 0">
    <RequiredPlugin pluginName="Optimus"/>
    <RequiredPlugin pluginName="SofaPardisoSolver"/>

    <VisualStyle displayFlags="hideBehaviorModels showForceFields showCollisionModels" />

    <FilteringAnimationLoop name="StochAnimLoop" verbose="1"/>
    <ROUKFilter name="ROUKF" verbose="1"/>
    <MeshVTKLoader filename="../../Data/beamA1_1635.vtk" name="loader" />
    <MeshSTLLoader filename="../../Data/beamA1_1635.stl" name="surfLoader" />

    <!-- <Node name="bcScene">             -->
        <Node name="toolEmu" tags="preanim">
            <PreStochasticWrapper name="PreStochasticWrap" verbose="1"/>
            <StaticSolver name="NewtonStatic" printLog="1" correction_tolerance_threshold="1e-8" residual_tolerance_threshold="1e-8" should_diverge_when_residual_is_growing="1" newton_iterations="1"/>
            <CGLinearSolver name="lsolver" iterations="100" tolerance="1e-20" threshold="1e-20"/>
            <PointSetTopologyContainer name='pointTopo' position='0.16 0.06 0.01  0.16 0.06 0.025  0.16 0.06 0.040  0.16 0.06 0.055   0.16 0.06 0.070   0.175 0.06 0.01  0.175 0.06 0.025  0.175 0.06 0.040  0.175 0.06 0.055   0.175 0.06 0.070'/>
            <MechanicalObject name="MO" position="@pointTopo.position"/>
            <LinearMovementConstraint indices="0 1 2 3 4 5 6 7 8 9" keyDisplacements="0 0 0    0.05 0.05 0" keyTimes="0 2" printLog="1"/>
            <SphereCollisionModel radius="0.002"/>
        </Node>

        <Node name="daObject">
            <StochasticStateWrapper name="StateWrapper" verbose="1" writeStateFile="states/beamA1_1635_A_ROUKF103_E30_s10_som2.state"/>
            <OptimParams name="springStiffness" template="Vector" optimize="1" numParams="103" initValue="30" stdev="10" printLog="1" transformParams="1"/>

            <!-- <EulerImplicit name="odeSolver" printLog="false" rayleighStiffness="0.1"/> -->
            <StaticSolver name="NewtonStatic" printLog="1" correction_tolerance_threshold="1e-8" residual_tolerance_threshold="1e-8" should_diverge_when_residual_is_growing="1" newton_iterations="1"/>
            <StepPCGLinearSolver name="StepPCG" iterations="10000" tolerance="1e-12" preconditioners="precond" verbose="1" precondOnTimeStep="1"/>
            <CGLinearSolver name="lsolver" iterations="100" tolerance="1e-20" threshold="1e-20"/>

            <MechanicalObject src="@/loader" name="Volume" />
            <include href="Objects/TetrahedronSetTopology.xml" src="@/loader" />
            <UniformMass totalMass="0.2513"/>

            <BoxROI name="fixedBox1" box="-0.001 -0.001 -0.001   0.18 0.001 0.08"/>
            <!-- X = 0.05:  N=30;    X = 0.08  N=46    X = 0.18  N = 103-->
            <OglColorMap colorScheme="Blue to Red" />
            <RestShapeSpringForceField name="fixedSpring" points="@fixedBox1.indices" angularStiffness="0" stiffness="@springStiffness.value" listening="1" forceDir="springForces" printLog="0"/>

            <TetrahedronFEMForceField name="FEM" listening="true" updateStiffness="1"  youngModulus="1e5" poissonRatio="0.45" method="large" drawHeterogeneousTetra="1"/>

            <TargetFeatureErrorMetric listening="1" name="errorMetric" targetPositions="@/markers/MO.position" sourcePositions="@MO.position" simpleComparison="1"/>
            <VTKExporter listening="1" filename="vtk/BeamA1_" exportEveryNumberOfSteps="1" XMLformat="0" edges="0" tetras="1" pointsDataFields="errorMetric.errorPerPoint"/>

            <!-- <WriteState filename="states/beamA1_1635_A_ROUKF.state"/> -->

            <Node name="obsNode" activated="1">
                <!-- <MechanicalObject position="@../Volume.position"/>     -->
                <MechanicalObject name="MO" position="0.01 0.06 0.01  0.01 0.06 0.04  0.01 0.06 0.07  0.03 0.06 0.01  0.03 0.06 0.04  0.03 0.06 0.07  0.05 0.06 0.01  0.05 0.06 0.04  0.05 0.06 0.07  0.07 0.06 0.01  0.07 0.06 0.04  0.07 0.06 0.07  0.09 0.06 0.01  0.09 0.06 0.04  0.09 0.06 0.07  0.11 0.06 0.01  0.11 0.06 0.04  0.11 0.06 0.07  0.13 0.06 0.01  0.13 0.06 0.04  0.13 0.06 0.07  0.15 0.06 0.01  0.15 0.06 0.04  0.15 0.06 0.07"/>
                <SphereCollisionModel radius="0.001" color="1 0 0"/>
                <BarycentricMapping/>
                <MappedStateObservationManager name="MOBS" observationStdev="1e-2" noiseStdev="0.0" listening="1" stateWrapper="@../StateWrapper" verbose="1"/>
                <SimulatedStateObservationSource name="ObsSource" monitorPrefix="../obsBoundaryDA/beam1635_A"/>
            </Node>

            <Node name="visualization" activated="1">
                <include href="Objects/TriangleSetTopology.xml" src="@/surfLoader" />
                <MechanicalObject src="@/surfLoader" name="Surface"/>
                <LineCollisionModel color="0 0 0 1"/>
                <TriangleCollisionModel color="1 0 0 1"/>
                <BarycentricMapping/>
            </Node>

            <Node name="mappedTool">
                <MechanicalObject name="MO" position="0.16 0.06 0.01  0.16 0.06 0.025  0.16 0.06 0.040  0.16 0.06 0.055   0.16 0.06 0.070   0.175 0.06 0.01  0.175 0.06 0.025  0.175 0.06 0.040  0.175 0.06 0.055   0.175 0.06 0.070"/>
                <RestShapeSpringForceField name="toolSpring" angularStiffness="0" stiffness="1e5" external_rest_shape="@../../toolEmu/MO" listening="1" springColor="0 1 0 1" printLog="0" />
                <OglColorMap colorScheme="Blue to Red" />
                <SphereCollisionModel radius="0.002" color="0 0 1 1"/>
                <BarycentricMapping name="baryMapping"/>
            </Node>
        </Node>
    <!-- </Node>         -->
</Node>
